/* Definicoes de baterias */

// Baterias A1-1
New monitor.ad-bateria-A1-1_potencia element=Storage.BateriaA1-1 terminal=1 mode=1 ppolar=0
New monitor.ad-bateria-A1-1_tensao element=Storage.BateriaA1-1 terminal=1 mode=0
New monitor.ad-bateria-A1-1_variaveis element=Storage.BateriaA1-1 terminal=1 mode=3
// Baterias A1-2
New monitor.ad-bateria-A1-2_potencia element=Storage.BateriaA1-2 terminal=1 mode=1 ppolar=0
New monitor.ad-bateria-A1-2_tensao element=Storage.BateriaA1-2 terminal=1 mode=0
New monitor.ad-bateria-A1-2_variaveis element=Storage.BateriaA1-2 terminal=1 mode=3
// Baterias A1-3
New monitor.ad-bateria-A1-3_potencia element=Storage.BateriaA1-3 terminal=1 mode=1 ppolar=0
New monitor.ad-bateria-A1-3_tensao element=Storage.BateriaA1-3 terminal=1 mode=0
New monitor.ad-bateria-A1-3_variaveis element=Storage.BateriaA1-3 terminal=1 mode=3
// Baterias A1-4
New monitor.ad-bateria-A1-4_potencia element=Storage.BateriaA1-4 terminal=1 mode=1 ppolar=0
New monitor.ad-bateria-A1-4_tensao element=Storage.BateriaA1-4 terminal=1 mode=0
New monitor.ad-bateria-A1-4_variaveis element=Storage.BateriaA1-4 terminal=1 mode=3
// Baterias A1-5
New monitor.ad-bateria-A1-5_potencia element=Storage.BateriaA1-5 terminal=1 mode=1 ppolar=0
New monitor.ad-bateria-A1-5_tensao element=Storage.BateriaA1-5 terminal=1 mode=0
New monitor.ad-bateria-A1-5_variaveis element=Storage.BateriaA1-5 terminal=1 mode=3
